** written by FreeCAD inp file writer for CalculiX,Abaqus meshes
** highest dimension mesh elements only.

** Nodes
*Node, NSET=Nall
1, 0, 28870, 12000
2, 0, 28870, -14000
3, -25002.15340726, -14435, -14000
4, -25002.15340726, -14435, 12000
5, -16668.1022715, 0, 12000
6, 25002.15340726, -14435, -14000
7, 25002.15340726, -14435, 12000
8, 0, -14435, 12000
9, 16668.1022715, 4.547e-12, 12000
10, 0, 28870, 5500
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

** Volume elements
*Element, TYPE=C3D4, ELSET=Evolumes
482, 214, 80, 211, 218
483, 67, 93, 211, 216
484, 80, 67, 93, 211
485, 211, 93, 80, 223
486, 211, 67, 216, 218
487, 148, 213, 215, 220
488, 211, 80, 214, 223
489, 124, 86, 100, 232
490, 213, 97, 215, 220
491, 211, 80, 67, 218
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
** Define element set Eall
*ELSET, ELSET=Eall
Evolumes

*Nset, Nset=bottom_fix
3, 6, 13,
**
*Material, Name=Material-design
*Elastic
200000.0, 0.27
*Density
7.833e-09
**
*Solid section, Elset=design_space, Material=Material-design
**
*Step
*Static
**
*Boundary, op=NEW
*Boundary
** bottom_fix fallback
bottom_fix, 1, 1, 0
bottom_fix, 2, 2, 0
bottom_fix, 3, 3, 0
**
*Cload, op=NEW
*Cload
165, 3, -1000
**
*Node file
RF, U
*El file
S
*End step
