** CalculiX: FEM shell mesh + Pad001 dual elset (full model, BESO optimizes design_space only)
*Node, NSET=Nall
1, -2986.5529862660, 23697.1412862000, 12000.0000000000
2, -2986.5529862660, 23697.1412862000, -14000.0000000000
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

** Face elements
**
** Shell elements (all retained; nondesign_space not removed)
*Element, TYPE=S6, Elset=design_space
3420, 6635, 6652, 6599, 6674, 6675, 6676
3421, 6600, 6653, 6634, 6677, 6678, 6679
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*Element, TYPE=S6, Elset=nondesign_space
3636, 1543, 6, 6979, 1552, 6988, 6989
3637, 6979, 6, 1556, 6988, 1558, 6990
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**
*Physical constants, ABSOLUTE ZERO=0, STEFAN BOLTZMANN=5.670374419e-11
*Shell section, Elset=design_space, Material=Material-shell
2.0
*Shell section, Elset=nondesign_space, Material=Material-shell
2.0
**
*Material, name=Material-shell
*Elastic
210000.0, 0.27
*Density
7.833e-09
**
** BESO: dual shell sections (design_space / nondesign_space)
*Step
*Static
*Boundary
79,1,3,0
*Cload
11710,1,281000.0
*Node print, nset=Nall, frequency=1
U
*El print, elset=design_space, frequency=1
S
*End step
